<?xml version="1.0"?>
<?xml-stylesheet type="text/xsl" href="http://jsbsim.sourceforge.net/JSBSim.xsl"?>
<fdm_config name="Tornado-Jsb" version="2.0" release="ALPHA"
   xmlns:xsi="http://www.w3.org/2001/XMLSchema-instance"
   xsi:noNamespaceSchemaLocation="http://jsbsim.sourceforge.net/JSBSim.xsd">

 <fileheader>
  <author> Aeromatic v 0.95 </author>
  <filecreationdate>2015-05-23</filecreationdate>
  <version>$Revision: 1.15 $</version>
  <description> Models a Tornado-Jsb. </description>
 </fileheader>

 <metrics>
   <wingarea  unit="M2">  47.60 </wingarea>
   <wingspan  unit="M" >  13.91 </wingspan>
   <wing_incidence>        0.00 </wing_incidence>
   <chord     unit="M" >   3.30 </chord>
   <htailarea unit="M2">  10.00 </htailarea>
   <htailarm  unit="M" >   5.00 </htailarm>
   <vtailarea unit="M2">   8.50 </vtailarea>
   <vtailarm  unit="M" >   6.00 </vtailarm>
   <location name="AERORP" unit="M">
     <x>  0.3 </x>
     <y>  0.0 </y>
     <z>  0.0 </z>
   </location>
   <location name="EYEPOINT" unit="M">
     <x> -4.0 </x>
     <y>  0.0 </y>
     <z>  0.0 </z>
   </location>
   <location name="VRP" unit="M">
     <x>  0.0 </x>
     <y>  0.0 </y>
     <z>  0.0 </z>
   </location>
 </metrics>

 <mass_balance>
   <ixx unit="KG*M2">  44742 </ixx>
   <iyy unit="KG*M2"> 223710 </iyy>
   <izz unit="KG*M2"> 257605 </izz>
   <ixz unit="KG*M2">  11000 </ixz>
   <emptywt unit="KG"> 14300 </emptywt>
   <location name="CG" unit="M">
     <x>  0.0 </x>
     <y>  0.0 </y>
     <z> -0.9 </z>
   </location>
 </mass_balance>

 <ground_reactions>
  <contact type="BOGEY" name="FRONT">
   <location unit="M">
     <x> -4.20 </x>
     <y>  0.00 </y>
     <z> -2.80 </z>
   </location>
   <static_friction>  0.80 </static_friction>
   <dynamic_friction> 0.50 </dynamic_friction>
   <rolling_friction> 0.02 </rolling_friction>
   <spring_coeff unit="LBS/FT">      18510.00 </spring_coeff>
   <damping_coeff unit="LBS/FT/SEC">  9850.00 </damping_coeff>
   <max_steer unit="DEG"> 45.00 </max_steer>
   <brake_group>NONE</brake_group>
   <retractable>1</retractable>
  </contact>

  <contact type="BOGEY" name="LEFT_MAIN">
   <location unit="M">
     <x>  1.00 </x>
     <y> -1.60 </y>
     <z> -2.72 </z>
   </location>
   <static_friction>  0.80 </static_friction>
   <dynamic_friction> 0.50 </dynamic_friction>
   <rolling_friction> 0.02 </rolling_friction>
   <spring_coeff unit="LBS/FT">      61700.00 </spring_coeff>
   <damping_coeff unit="LBS/FT/SEC"> 30850.00 </damping_coeff>
   <max_steer unit="DEG">0</max_steer>
   <brake_group>LEFT</brake_group>
   <retractable>1</retractable>
  </contact>

  <contact type="BOGEY" name="RIGHT_MAIN">
   <location unit="M">
     <x>  1.00 </x>
     <y>  1.60 </y>
     <z> -2.72 </z>
   </location>
   <static_friction>  0.80 </static_friction>
   <dynamic_friction> 0.50 </dynamic_friction>
   <rolling_friction> 0.02 </rolling_friction>
   <spring_coeff unit="LBS/FT">      61700.00 </spring_coeff>
   <damping_coeff unit="LBS/FT/SEC"> 30850.00 </damping_coeff>
   <max_steer unit="DEG">0</max_steer>
   <brake_group>RIGHT</brake_group>
   <retractable>1</retractable>
  </contact>

  <contact type="STRUCTURE" name="NOSE">
    <location unit="M">
     <x> -8.5 </x>
     <y>  0.0 </y>
     <z> -1.3 </z>
    </location>
    <static_friction>  1.00 </static_friction>
    <dynamic_friction> 1.00 </dynamic_friction>
    <spring_coeff unit="LBS/FT">      61700.00 </spring_coeff>
    <damping_coeff unit="LBS/FT/SEC"> 61700.00 </damping_coeff>
  </contact>

  <contact type="STRUCTURE" name="LEFT_WING">
    <location unit="M">
     <x>  2.9 </x>
     <y> -6.9 </y>
     <z> -0.9 </z>
    </location>
    <static_friction>  1.00 </static_friction>
    <dynamic_friction> 1.00 </dynamic_friction>
    <spring_coeff unit="LBS/FT">      61700.00 </spring_coeff>
    <damping_coeff unit="LBS/FT/SEC"> 61700.00 </damping_coeff>
  </contact>

  <contact type="STRUCTURE" name="RIGHT_WING">
    <location unit="M">
     <x>  2.9 </x>
     <y>  6.9 </y>
     <z> -0.9 </z>
    </location>
    <static_friction>  1.00 </static_friction>
    <dynamic_friction> 1.00 </dynamic_friction>
    <spring_coeff unit="LBS/FT">      61700.00 </spring_coeff>
    <damping_coeff unit="LBS/FT/SEC"> 61700.00 </damping_coeff>
  </contact>
 </ground_reactions>

 <propulsion>
   <engine file="RB199-34R">
    <location unit="M">
      <x>  4.0 </x>
      <y> -0.5 </y>
      <z> -0.9 </z>
    </location>
    <feed>0</feed>
    <feed>2</feed>
    <thruster file="direct">
     <location unit="M">
      <x>  4.5 </x>
      <y> -0.5 </y>
      <z> -0.9 </z>
     </location>
     <orient unit="DEG">
       <pitch> 0.00 </pitch>
       <roll>  0.00 </roll>
       <yaw>   0.00 </yaw>
     </orient>
    </thruster>
  </engine>

   <engine file="RB199-34R">
    <location unit="M">
      <x>  4.0 </x>
      <y>  0.5 </y>
      <z> -0.9 </z>
    </location>
    <feed>1</feed>
    <feed>2</feed>
    <thruster file="direct">
     <location unit="M">
      <x>  4.5 </x>
      <y>  0.5 </y>
      <z> -0.9 </z>
     </location>
     <orient unit="DEG">
       <pitch> 0.00 </pitch>
       <roll>  0.00 </roll>
       <yaw>   0.00 </yaw>
     </orient>
    </thruster>
  </engine>

  <tank type="FUEL" number="0">
     <location unit="M">
       <x>  1.3 </x>
       <y> -3.5 </y>
       <z> -0.5 </z>
     </location>
     <priority>1</priority>
     <capacity unit="LBS"> 4158 </capacity>
     <contents unit="LBS"> 4158 </contents>
  </tank>

  <tank type="FUEL" number="1">
     <location unit="M">
       <x>  1.3 </x>
       <y>  3.5 </y>
       <z> -0.5 </z>
     </location>
     <priority>1</priority>
     <capacity unit="LBS"> 4158 </capacity>
     <contents unit="LBS"> 4158 </contents>
  </tank>

  <tank type="FUEL" number="2">
     <location unit="M">
       <x>  0.0 </x>
       <y>  0.0 </y>
       <z> -0.9 </z>
     </location>
     <priority>2</priority>
     <capacity unit="LBS"> 11211 </capacity>
     <contents unit="LBS"> 11211 </contents>
  </tank>
 </propulsion>

 <flight_control file="Systems/jsb-controls"/>
 <aerodynamics file="Tornado-aerodynamics.xml"/>

<!--
<output name="/tmp/tornado.csv" type="CSV" rate="10">
                        <property>aero/force/LIFT</property>
                        <property>aero/force/DRAG</property>
                        <property>aero/force/SIDE</property>
                        <property>aero/force/ROLL</property>
                        <property>aero/force/PITCH</property>
                        <property>aero/force/YAW</property>
</output>
-->
</fdm_config>
